<?xml version="1.0"?>
<!-- Generated by Aero-Matic v 1

     Inputs:
                horsepower: 967.0
                     pitch: variable
            max engine rpm: 2200
        prop diameter (ft): 10.8273

     Outputs:
              max prop rpm: 1732.93
                gear ratio:    1.27
                       Cp0: 0.062386
                       Ct0: 0.145358
       static thrust (lbs): 3962.73
-->

<propeller name="prop">
  <ixx>14.7823 </ixx>
  <diameter unit="IN">129.9 </diameter>
  <numblades> 4 </numblades>
  <gearratio>1.687 </gearratio>
  <minpitch> 12 </minpitch>
  <maxpitch> 65 </maxpitch>
  <minrpm>   296.3 </minrpm>
  <maxrpm>   1304 </maxrpm>

  <table name="C_THRUST" type="internal">
      <tableData>
                -10         0       15       25       35       45       55       65       90
      -0.2      -0.0709   0.0400   0.1454   0.1781   0.1962   0.2071   0.1909   0.1635   0.0000
       0.0      -0.1054   0.0000   0.1454   0.1781   0.1962   0.2090   0.1954   0.1635   0.0000
       0.2      -0.1182   -0.0363   0.1254   0.1744   0.1935   0.2090   0.1954   0.1635   0.0000
       0.4      -0.1182   -0.0845   0.0945   0.1727   0.1898   0.2071   0.1954   0.1635   0.0000
       0.6      -0.1182   -0.1182   0.0500   0.1554   0.1817   0.2018   0.1926   0.1635   0.0000
       0.8      -0.1182   -0.1182   0.0028   0.1163   0.1763   0.1945   0.1926   0.1635   0.0000
       1.0      -0.1182   -0.1182   -0.0472   0.0709   0.1691   0.1845   0.1909   0.1635   0.0000
       1.2      -0.1182   -0.1182   -0.0972   0.0218   0.1390   0.1781   0.1909   0.1635   0.0000
       1.4      -0.1182   -0.1182   -0.1182   -0.0318   0.1000   0.1753   0.1872   0.1635   0.0000
       1.6      -0.1182   -0.1182   -0.1182   -0.0808   0.0545   0.1691   0.1836   0.1635   0.0000
       1.8      -0.1182   -0.1182   -0.1182   -0.1182   0.0092   0.1454   0.1781   0.1635   0.0000
       2.0      -0.1182   -0.1182   -0.1182   -0.1182   -0.0363   0.1135   0.1773   0.1635   0.0000
       2.2      -0.1182   -0.1182   -0.1182   -0.1182   -0.0818   0.0818   0.1744   0.1635   0.0000
       2.4      -0.1182   -0.1182   -0.1182   -0.1182   -0.1182   0.0436   0.1425   0.1635   0.0000
       2.6      -0.1182   -0.1182   -0.1182   -0.1182   -0.1182   0.0055   0.0901   0.1454   0.0000
       2.8      -0.1182   -0.1182   -0.1182   -0.1182   -0.1182   -0.0327   0.0590   0.1182   0.0000
       3.0      -0.1182   -0.1182   -0.1182   -0.1182   -0.1182   -0.0709   0.0310   0.0908   0.0000
       3.2      -0.1182   -0.1182   -0.1182   -0.1182   -0.1182   -0.1090   0.0028   0.0637   0.0000
       3.4      -0.1182   -0.1182   -0.1182   -0.1182   -0.1182   -0.1182   -0.0254   0.0363   0.0000
       3.6      -0.1182   -0.1182   -0.1182   -0.1182   -0.1182   -0.1182   -0.0536   0.0092   0.0000
       3.8      -0.1182   -0.1182   -0.1182   -0.1182   -0.1182   -0.1182   -0.0818   -0.0182   0.0000
       4.0      -0.1182   -0.1182   -0.1182   -0.1182   -0.1182   -0.1182   -0.1099   -0.0455   0.0000
       6.0      -0.1182   -0.1182   -0.1182   -0.1182   -0.1182   -0.1182   -0.1182   -0.1182   0.0000
      </tableData>
  </table>

  <table name="C_POWER" type="internal">
     <tableData>
               -10        0       15       25       35       45       55        65        90
      -0.2      0.0104   0.0208   0.0728   0.1653   0.2851   0.4055   0.4679   0.5178   0.5178
       0.0      0.0416   0.0104   0.0624   0.1541   0.2726   0.4055   0.4698   0.5178   0.5178
       0.2      0.0593   0.0167   0.0603   0.1435   0.2608   0.4055   0.4698   0.5178   0.5178
       0.4      0.0799   0.0364   0.0520   0.1323   0.2477   0.4055   0.4698   0.5178   0.5178
       0.6      0.0979   0.0551   0.0343   0.1229   0.2321   0.3974   0.4679   0.5178   0.5178
       0.8      0.1154   0.0738   0.0104   0.1042   0.2183   0.3793   0.4679   0.5178   0.5178
       1.0      0.1329   0.0917   0.0104   0.0730   0.2059   0.3600   0.4660   0.5178   0.5178
       1.2      0.1510   0.0733   -0.0343   0.0281   0.1822   0.3450   0.4629   0.5178   0.5178
       1.4      0.1684   0.1266   -0.0518   -0.0208   0.1404   0.3400   0.4573   0.5178   0.5178
       1.6      0.1859   0.1447   -0.0605   -0.0624   0.0886   0.3306   0.4473   0.4991   0.5178
       1.8      0.2040   0.1622   -0.0624   -0.1042   0.0260   0.2932   0.4336   0.4885   0.5178
       2.0      0.2215   0.1797   -0.0799   -0.1454   -0.0312   0.2495   0.4130   0.4785   0.5178
       2.2      0.2389   0.1978   -0.0979   -0.1872   -0.0936   0.2028   0.4005   0.4573   0.5178
       2.4      0.2570   0.2152   -0.1154   -0.2290   -0.1560   0.1447   0.3887   0.4473   0.5178
       2.6      0.2745   0.2327   -0.1329   -0.2701   -0.1978   0.0605   0.3793   0.4317   0.5178
       2.8      0.2920   0.2508   -0.1510   -0.3119   -0.2371   -0.0206   0.3712   0.4261   0.5178
       3.0      0.3101   0.2683   -0.1684   -0.3537   -0.2807   -0.0936   0.3587   0.4261   0.5178
       3.2      0.3275   0.2857   -0.1859   -0.3949   -0.3225   -0.1666   0.3356   0.4161   0.5178
       3.4      0.3450   0.3038   -0.2040   -0.4367   -0.3637   -0.2389   0.2601   0.4055   0.5178
       3.6      0.3631   0.3213   -0.2215   -0.4785   -0.4055   -0.3119   0.1828   0.3949   0.5178
       3.8      0.3806   0.3388   -0.2389   -0.5178   -0.4473   -0.3849   0.1017   0.3824   0.5178
       4.0      0.3980   0.3568   -0.2570   -0.5178   -0.5178   -0.4573   0.0206   0.3537   0.5178
       6.0      0.5178   0.5178   -0.5178   -0.5178   -0.5178   -0.5178  -0.5178  -0.3119   0.5178
     </tableData>
  </table>

</propeller>
